<?xml version="1.0"?>
<?xml-stylesheet type="text/xsl" href="http://jsbsim.sourceforge.net/JSBSim.xsl"?>
<fdm_config name="Dromader" version="2.0" release="ALPHA"
  xmlns:xsi="http://www.w3.org/2001/XMLSchema-instance"
  xsi:noNamespaceSchemaLocation="http://jsbsim.sourceforge.net/JSBSim.xsd">


  <!--
  File:     M18B Dromader.xml
  Inputs:
    name:          M18B Dromader
    type:          light single
    max weight:    10363.5 lb
    wing span:     58.0737 ft
    length:        31.07107 ft
    wing area:     430.6 sq-ft
    gear type:     taildragger
    retractable?:  no
    # engines:     1
    engine type:   piston
    engine layout: forward fuselage
    yaw damper?    no

  Outputs:
    wing loading:  24.07 lb/sq-ft
    CL-alpha:      5 per radian
    CL-0:          0.25
    CL-max:        1.4
    CD-0:          0.028
    K:             0.04

-->

  <!-- Medidas y pesos -->

  <metrics>
    <wingarea unit="FT2">  430.60 </wingarea>
    <wingspan unit="FT">   58.07 </wingspan>
    <wing_incidence>          2.00 </wing_incidence>
    <chord unit="FT">    7.41 </chord>
    <htailarea unit="FT2">   68.90 </htailarea>
    <htailarm unit="FT">   16.16 </htailarm>
    <vtailarea unit="FT2">   43.06 </vtailarea>
    <vtailarm unit="FT">   15.54 </vtailarm>
    <location name="AERORP" unit="M">
      <x> 0.85 </x>
      <y>   0.00 </y>
      <z>   0.00 </z>
    </location>
    <location name="EYEPOINT" unit="IN">
      <x>  48.47 </x>
      <y> -18.00 </y>
      <z>  45.00 </z>
    </location>
    <location name="VRP" unit="IN">
      <x>0</x>
      <y>0</y>
      <z>0</z>
    </location>
  </metrics>

  <mass_balance>
    <ixx unit="SLUG*FT2">     11869 </ixx>
    <iyy unit="SLUG*FT2">      6040 </iyy>
    <izz unit="SLUG*FT2">     16919 </izz>
    <emptywt unit="LBS">      5975 </emptywt>
    <location name="CG" unit="M">
      <x> 0.80 </x>
      <y>  0.00 </y>
      <z>  -0.24 </z>
    </location>
    <pointmass name="Pilot">
      <weight unit="LBS"> 200.0 </weight>
      <location name="POINTMASS" unit="M">
        <x> 2.10 </x>
        <y> 0.00 </y>
        <z> 0.67 </z>
      </location>
    </pointmass>
    <pointmass name="Baggage">
      <weight unit="LBS"> 0 </weight>
      <location name="POINTMASS" unit="M">
        <x> 3 </x>
        <y> 0.00 </y>
        <z> 0.67 </z>
      </location>
    </pointmass>

    <!-- *************************************

		PESO DEL AGUA O CARGA

 ************************************** -->

    <pointmass name="Water-Pesticide">
      <weight unit="LBS"> 0 </weight>
      <location name="POINTMASS" unit="M">
        <x> 0.512829 </x>
        <y> 0.00     </y>
        <z> 0.300413 </z>
      </location>
    </pointmass>

  </mass_balance>

  <!-- Tren de aterrizaje -->
  <ground_reactions>

    <contact type="BOGEY" name="LEFT_MAIN">
      <location unit="M">
        <x> -0.51 </x>
        <y> -1.71 </y>
        <z> -2.06 </z>
      </location>
      <static_friction>  0.90 </static_friction>
      <dynamic_friction> 0.50 </dynamic_friction>
      <rolling_friction> 0.02 </rolling_friction>
      <spring_coeff unit="LBS/FT">       8363.50 </spring_coeff>
      <damping_coeff unit="LBS/FT/SEC">   950.70 </damping_coeff>
      <max_steer unit="DEG">0</max_steer>
      <brake_group>LEFT</brake_group>
      <retractable>0</retractable>
    </contact>

    <contact type="BOGEY" name="RIGHT_MAIN">
      <location unit="M">
        <x>-0.51 </x>
        <y> 1.71 </y>
        <z>-2.06 </z>
      </location>
      <static_friction>  0.99 </static_friction>
      <dynamic_friction> 0.50 </dynamic_friction>
      <rolling_friction> 0.02 </rolling_friction>
      <spring_coeff unit="LBS/FT">       8363.50 </spring_coeff>
      <damping_coeff unit="LBS/FT/SEC">   950.70 </damping_coeff>
      <max_steer unit="DEG">0</max_steer>
      <brake_group>RIGHT</brake_group>
      <retractable>0</retractable>
    </contact>

    <contact type="BOGEY" name="TAIL">
      <location unit="M">
        <x> 5.39 </x>
        <y> 0.00 </y>
        <z>-0.95 </z>
      </location>
      <static_friction>  0.80 </static_friction>
      <dynamic_friction> 0.50 </dynamic_friction>
      <rolling_friction> 0.02 </rolling_friction>
      <spring_coeff unit="LBS/FT">       8363.50 </spring_coeff>
      <damping_coeff unit="LBS/FT/SEC">   500.80 </damping_coeff>
      <max_steer unit="DEG"> 30.00 </max_steer>
      <brake_group>NONE</brake_group>
      <retractable>0</retractable>
    </contact>

    <!-- Alas -->
    <contact type="STRUCTURE" name="LEFT_WING">
      <location unit="IN">
        <x> 178.97 </x>
        <y> -29.04 </y>
        <z>  -9.32 </z>
      </location>
      <static_friction>  0.80 </static_friction>
      <dynamic_friction> 0.50 </dynamic_friction>
      <spring_coeff unit="LBS/FT">      10363.50 </spring_coeff>
      <damping_coeff unit="LBS/FT/SEC">  2072.70 </damping_coeff>
    </contact>

    <contact type="STRUCTURE" name="RIGHT_WING">
      <location unit="IN">
        <x> 178.97 </x>
        <y>  29.04 </y>
        <z>  -9.32 </z>
      </location>
      <static_friction>  0.80 </static_friction>
      <dynamic_friction> 0.50 </dynamic_friction>
      <spring_coeff unit="LBS/FT">      10363.50 </spring_coeff>
      <damping_coeff unit="LBS/FT/SEC">  2072.70 </damping_coeff>
    </contact>

  </ground_reactions>

  <!-- Motores y helices -->
  <propulsion>

    <engine file="engine_Asz-62IRM18">
      <location unit="IN">
        <x>  36.00 </x>
        <y>   0.00 </y>
        <z>   0.00 </z>
      </location>
      <orient unit="DEG">
        <pitch> 0.00 </pitch>
        <roll>   0.00 </roll>
        <yaw>   0.00 </yaw>
      </orient>
      <feed>0</feed>
      <feed>1</feed>
      <thruster file="prop_Asz-62IRM18">
        <location unit="IN">
          <x>  36.00 </x>
          <y>   0.00 </y>
          <z>   0.00 </z>
        </location>
        <orient unit="DEG">
          <pitch> 0.00 </pitch>
          <roll>   0.00 </roll>
          <yaw>   0.00 </yaw>
        </orient>
      </thruster>
    </engine>

    <!-- Tanques de combustible -->
    <tank type="FUEL" number="0">
      <location unit="M">
        <x> 0.36 </x>
        <y>-1.14 </y>
        <z>-0.47 </z>
      </location>
      <capacity unit="LBS"> 500.00 </capacity>
      <contents unit="LBS"> 250.00 </contents>
    </tank>

    <tank type="FUEL" number="1">
      <location unit="M">
        <x> 0.36 </x>
        <y> 1.14 </y>
        <z>-0.47 </z>
      </location>
      <capacity unit="LBS"> 500.00 </capacity>
      <contents unit="LBS"> 250.00 </contents>
    </tank>

  </propulsion>

  <system file="water" />

  <!-- *Controles* -->
  <flight_control name="FCS:Dromader">

    <!-- Controles elevacion -->
    <channel name="Pitch">
      <summer name="Pitch Trim Sum">
        <input>fcs/elevator-cmd-norm</input>
        <input>fcs/pitch-trim-cmd-norm</input>
        <clipto>
          <min> -1 </min>
          <max>  1 </max>
        </clipto>
      </summer>

      <aerosurface_scale name="Elevator Control">
        <input>fcs/pitch-trim-sum</input>
        <range>
          <min> -0.35 </min>
          <max>  0.35 </max>
        </range>
        <output>fcs/elevator-pos-rad</output>
      </aerosurface_scale>

      <aerosurface_scale name="elevator normalization">
        <input>fcs/elevator-pos-rad</input>
        <domain>
          <min> -0.35 </min>
          <max>  0.35 </max>
        </domain>
        <range>
          <min> -1 </min>
          <max>  1 </max>
        </range>
        <output>fcs/elevator-pos-norm</output>
      </aerosurface_scale>

    </channel>

    <!-- Controles de los alerones -->
    <channel name="Roll">
      <summer name="Roll Trim Sum">
        <input>fcs/aileron-cmd-norm</input>
        <input>fcs/roll-trim-cmd-norm</input>
        <clipto>
          <min> -1 </min>
          <max>  1 </max>
        </clipto>
      </summer>

      <aerosurface_scale name="Left Aileron Control">
        <input>fcs/roll-trim-sum</input>
        <range>
          <min> -0.35 </min>
          <max>  0.35 </max>
        </range>
        <output>fcs/left-aileron-pos-rad</output>
      </aerosurface_scale>

      <aerosurface_scale name="Right Aileron Control">
        <input>fcs/roll-trim-sum</input>
        <range>
          <min> -0.35 </min>
          <max>  0.35 </max>
        </range>
        <output>fcs/right-aileron-pos-rad</output>
      </aerosurface_scale>

      <aerosurface_scale name="left aileron normalization">
        <input>fcs/left-aileron-pos-rad</input>
        <domain>
          <min> -0.35 </min>
          <max>  0.35 </max>
        </domain>
        <range>
          <min> -1 </min>
          <max>  1 </max>
        </range>
        <output>fcs/left-aileron-pos-norm</output>
      </aerosurface_scale>

      <aerosurface_scale name="right aileron normalization">
        <input>fcs/right-aileron-pos-rad</input>
        <domain>
          <min> -0.35 </min>
          <max>  0.35 </max>
        </domain>
        <range>
          <min> -1 </min>
          <max>  1 </max>
        </range>
        <output>fcs/right-aileron-pos-norm</output>
      </aerosurface_scale>

    </channel>

    <!-- Controles del Timon -->
    <channel name="Yaw">
      <summer name="Rudder Command Sum">
        <input>fcs/rudder-cmd-norm</input>
        <input>fcs/yaw-trim-cmd-norm</input>
        <clipto>
          <min> -0.35 </min>
          <max>  0.35 </max>
        </clipto>
      </summer>

      <aerosurface_scale name="Rudder Control">
        <input>fcs/rudder-command-sum</input>
        <range>
          <min> -0.35 </min>
          <max>  0.35 </max>
        </range>
        <output>fcs/rudder-pos-rad</output>
      </aerosurface_scale>

      <aerosurface_scale name="rudder normalization">
        <input>fcs/rudder-pos-rad</input>
        <domain>
          <min> -0.35 </min>
          <max>  0.35 </max>
        </domain>
        <range>
          <min> -1 </min>
          <max>  1 </max>
        </range>
        <output>fcs/rudder-pos-norm</output>
      </aerosurface_scale>

    </channel>

    <!-- Controles de los Flaps -->
    <channel name="Flaps">
      <kinematic name="Flaps Control">
        <input>fcs/flap-cmd-norm</input>
        <traverse>
          <setting>
            <position>  0 </position>
            <time>      0 </time>
          </setting>
          <setting>
            <position> 15 </position>
            <time>      4 </time>
          </setting>
          <setting>
            <position> 30 </position>
            <time>      3 </time>
          </setting>
        </traverse>
        <output>fcs/flap-pos-deg</output>
      </kinematic>

      <aerosurface_scale name="flap normalization">
        <input>fcs/flap-pos-deg</input>
        <domain>
          <min>  0 </min>
          <max> 30 </max>
        </domain>
        <range>
          <min> 0 </min>
          <max> 1 </max>
        </range>
        <output>fcs/flap-pos-norm</output>
      </aerosurface_scale>

    </channel>

    <!-- Controles tren de aterrizaje -->
    <channel name="Landing Gear"></channel>

    <!-- Aerofrenos -->
    <channel name="Speedbrake">
      <kinematic name="Speedbrake Control">
        <input>fcs/speedbrake-cmd-norm</input>
        <traverse>
          <setting>
            <position> 0 </position>
            <time>     0 </time>
          </setting>
          <setting>
            <position> 1 </position>
            <time>     1 </time>
          </setting>
        </traverse>
        <output>fcs/speedbrake-pos-norm</output>
      </kinematic>

    </channel>

  </flight_control>

  <!-- *Aerodinamica* -->
  <aerodynamics>

    <!-- Sustentacion -->
    <axis name="LIFT">

      <function name="aero/coefficient/CLalpha">
        <description>Lift_due_to_alpha</description>
        <product>
          <property>aero/qbar-psf</property>
          <property>metrics/Sw-sqft</property>
          <table>
            <independentVar lookup="row">aero/alpha-rad</independentVar>
            <tableData>
              -0.20 -0.750
               0.00 0.250
             0.23    1.400
               0.60 0.710
            </tableData>
          </table>
        </product>
      </function>

      <function name="aero/coefficient/dCLflap">
        <description>Delta_Lift_due_to_flaps</description>
        <product>
          <property>aero/qbar-psf</property>
          <property>metrics/Sw-sqft</property>
          <property>fcs/flap-pos-deg</property>
          <value> 0.01333 </value>
        </product>
      </function>

      <function name="aero/coefficient/dCLsb">
        <description>Delta_Lift_due_to_speedbrake</description>
        <product>
          <property>aero/qbar-psf</property>
          <property>metrics/Sw-sqft</property>
          <property>fcs/speedbrake-pos-norm</property>
          <value>0</value>
        </product>
      </function>

      <function name="aero/coefficient/CLde">
        <description>Lift_due_to_Elevator_Deflection</description>
        <product>
          <property>aero/qbar-psf</property>
          <property>metrics/Sw-sqft</property>
          <property>fcs/elevator-pos-rad</property>
          <value>0.2</value>
        </product>
      </function>

    </axis>

    <!-- Resistencia al avance -->
    <axis name="DRAG">

      <function name="aero/coefficient/CD0">
        <description>Drag_at_zero_lift</description>
        <product>
          <property>aero/qbar-psf</property>
          <property>metrics/Sw-sqft</property>
          <table>
            <independentVar lookup="row">aero/alpha-rad</independentVar>
            <tableData>
             -1.57       1.500
             -0.26    0.036
              0.00    0.028
              0.26    0.036
              1.57       1.500
            </tableData>
          </table>
        </product>
      </function>

      <function name="aero/coefficient/CDi">
        <description>Induced_drag</description>
        <product>
          <property>aero/qbar-psf</property>
          <property>metrics/Sw-sqft</property>
          <property>aero/cl-squared</property>
          <value>0.04</value>
        </product>
      </function>

      <function name="aero/coefficient/CDmach">
        <description>Drag_due_to_mach</description>
        <product>
          <property>aero/qbar-psf</property>
          <property>metrics/Sw-sqft</property>
          <table>
            <independentVar lookup="row">velocities/mach</independentVar>
            <tableData>
                0.00      0.000
                0.7      0.000
                1.10      0.023
                1.80      0.015
            </tableData>
          </table>
        </product>
      </function>

      <function name="aero/coefficient/CDflap">
        <description>Drag_due_to_flaps</description>
        <product>
          <property>aero/qbar-psf</property>
          <property>metrics/Sw-sqft</property>
          <property>fcs/flap-pos-deg</property>
          <value> 0.00100 </value>
        </product>
      </function>

      <function name="aero/coefficient/CDsb">
        <description>Drag_due_to_speedbrakes</description>
        <product>
          <property>aero/qbar-psf</property>
          <property>metrics/Sw-sqft</property>
          <property>fcs/speedbrake-pos-norm</property>
          <value>0.028</value>
        </product>
      </function>

      <function name="aero/coefficient/CDbeta">
        <description>Drag_due_to_sideslip</description>
        <product>
          <property>aero/qbar-psf</property>
          <property>metrics/Sw-sqft</property>
          <table>
            <independentVar lookup="row">aero/beta-rad</independentVar>
            <tableData>
              -1.57       1.230
              -0.26    0.050
               0.00       0.000
               0.26    0.050
               1.57       1.230
            </tableData>
          </table>
        </product>
      </function>

      <function name="aero/coefficient/CDde">
        <description>Drag_due_to_Elevator_Deflection</description>
        <product>
          <property>aero/qbar-psf</property>
          <property>metrics/Sw-sqft</property>
          <abs>
            <property>fcs/elevator-pos-norm</property>
          </abs>
          <value>0.04</value>
        </product>
      </function>

    </axis>

    <!-- Lateral -->
    <axis name="SIDE">

      <function name="aero/coefficient/CYb">
        <description>Side_force_due_to_beta</description>
        <product>
          <property>aero/qbar-psf</property>
          <property>metrics/Sw-sqft</property>
          <property>aero/beta-rad</property>
          <value>0</value>
        </product>
      </function>

    </axis>

    <!-- Momentos -->
    <axis name="ROLL">

      <function name="aero/coefficient/Clb">
        <description>Roll_moment_due_to_beta</description>
        <product>
          <property>aero/qbar-psf</property>
          <property>metrics/Sw-sqft</property>
          <property>metrics/bw-ft</property>
          <property>aero/beta-rad</property>
          <value>-0.1</value>
        </product>
      </function>

      <function name="aero/coefficient/Clp">
        <description>Roll_moment_due_to_roll_rate</description>
        <product>
          <property>aero/qbar-psf</property>
          <property>metrics/Sw-sqft</property>
          <property>metrics/bw-ft</property>
          <property>aero/bi2vel</property>
          <property>velocities/p-aero-rad_sec</property>
          <value>-0.4</value>
        </product>
      </function>

      <function name="aero/coefficient/Clr">
        <description>Roll_moment_due_to_yaw_rate</description>
        <product>
          <property>aero/qbar-psf</property>
          <property>metrics/Sw-sqft</property>
          <property>metrics/bw-ft</property>
          <property>aero/bi2vel</property>
          <property>velocities/r-aero-rad_sec</property>
          <value>0.15</value>
        </product>
      </function>

      <function name="aero/coefficient/Clda">
        <description>Roll_moment_due_to_aileron</description>
        <product>
          <property>aero/qbar-psf</property>
          <property>metrics/Sw-sqft</property>
          <property>metrics/bw-ft</property>
          <property>fcs/left-aileron-pos-rad</property>
          <table>
            <independentVar lookup="row">velocities/mach</independentVar>
            <tableData>
              0.0    0.170
              2.0    0.057
            </tableData>
          </table>
        </product>
      </function>

      <function name="aero/coefficient/Cldr">
        <description>Roll_moment_due_to_rudder</description>
        <product>
          <property>aero/qbar-psf</property>
          <property>metrics/Sw-sqft</property>
          <property>metrics/bw-ft</property>
          <property>fcs/rudder-pos-rad</property>
          <value>0.01</value>
        </product>
      </function>

    </axis>

    <!-- Momentos -->
    <axis name="PITCH">

      <function name="aero/coefficient/Cmalpha">
        <description>Pitch_moment_due_to_alpha</description>
        <product>
          <property>aero/qbar-psf</property>
          <property>metrics/Sw-sqft</property>
          <property>metrics/cbarw-ft</property>
          <property>aero/alpha-rad</property>
          <value>-0.5</value>
        </product>
      </function>

      <function name="aero/coefficient/Cmde">
        <description>Pitch_moment_due_to_elevator</description>
        <product>
          <property>aero/qbar-psf</property>
          <property>metrics/Sw-sqft</property>
          <property>metrics/cbarw-ft</property>
          <property>fcs/elevator-pos-rad</property>
          <table>
            <independentVar lookup="row">velocities/mach</independentVar>
            <tableData>
              0.0     -1.100
              2.0     -0.275
            </tableData>
          </table>
        </product>
      </function>

      <function name="aero/coefficient/Cmq">
        <description>Pitch_moment_due_to_pitch_rate</description>
        <product>
          <property>aero/qbar-psf</property>
          <property>metrics/Sw-sqft</property>
          <property>metrics/cbarw-ft</property>
          <property>aero/ci2vel</property>
          <property>velocities/q-aero-rad_sec</property>
          <value>-12</value>
        </product>
      </function>

      <function name="aero/coefficient/Cmadot">
        <description>Pitch_moment_due_to_alpha_rate</description>
        <product>
          <property>aero/qbar-psf</property>
          <property>metrics/Sw-sqft</property>
          <property>metrics/cbarw-ft</property>
          <property>aero/ci2vel</property>
          <property>aero/alphadot-rad_sec</property>
          <value>-7</value>
        </product>
      </function>

    </axis>

    <!-- Momentos -->
    <axis name="YAW">

      <function name="aero/coefficient/Cnb">
        <description>Yaw_moment_due_to_beta</description>
        <product>
          <property>aero/qbar-psf</property>
          <property>metrics/Sw-sqft</property>
          <property>metrics/bw-ft</property>
          <property>aero/beta-rad</property>
          <value>0.12</value>
        </product>
      </function>

      <function name="aero/coefficient/Cnr">
        <description>Yaw_moment_due_to_yaw_rate</description>
        <product>
          <property>aero/qbar-psf</property>
          <property>metrics/Sw-sqft</property>
          <property>metrics/bw-ft</property>
          <property>aero/bi2vel</property>
          <property>velocities/r-aero-rad_sec</property>
          <value>-0.15</value>
        </product>
      </function>

      <function name="aero/coefficient/Cndr">
        <description>Yaw_moment_due_to_rudder</description>
        <product>
          <property>aero/qbar-psf</property>
          <property>metrics/Sw-sqft</property>
          <property>metrics/bw-ft</property>
          <property>fcs/rudder-pos-rad</property>
          <value>-0.1</value>
        </product>
      </function>

      <function name="aero/coefficient/Cnda">
        <description>Adverse_yaw</description>
        <product>
          <property>aero/qbar-psf</property>
          <property>metrics/Sw-sqft</property>
          <property>metrics/bw-ft</property>
          <property>fcs/left-aileron-pos-rad</property>
          <value>-0.01</value>
        </product>
      </function>

    </axis>

  </aerodynamics>

</fdm_config>
